# OpenSim document version 40000
IMUPlacerTool:
  model_file: arm26.osim
  orientation_file_at_placement_pose: elbow_motion.sto
  time_range: 0 0.5
  sensor_to_opensim_rotations: -90 0 0
  IMUPlacement_HeadingCorrection:
    IMU_bindings:
      IMU_Binding humerus_r_imu: segment_name=r_humerus
      IMU_Binding radius_r_imu: segment_name=r_ulna_radius
