# OpenSim document version 40000
IMUPlacerTool arm26_calibration:
  model_file: C:\Users\Srushti\Documents\OpenSim\4.4\Models\Arm26\arm26.osim
  orientation_file_for_calibration: C:\Users\Srushti\Documents\OpenSim\4.4\Models\Arm26\arm_movement.sto
  sensor_to_opensim_rotations: 0 0 0
  IMUPlacer: base_imu_label=IMU_UpperArm base_heading_axis=x
      output_model_file=C:\Users\Srushti\Documents\OpenSim\4.4\Models\Arm26\arm26_calibrated.osim
    IKTaskSet:
      IMUInverseKinematicsToolIMUNameTask IMU_UpperArm: applied=true model_segment_name=r_humerus
      IMUInverseKinematicsToolIMUNameTask IMU_Forearm: applied=true model_segment_name=r_ulna_radius_hand
